# Лаба 12
h := 0.01
n := 60
f(x, y) := x + y^2
i := 0 .. n - 1
[x[0]; y[0]] := [0; 1]
[x[i + 1]; y[i + 1]] := [x[i] + h; y[i] + h*f(x[i], y[i])]
# Решение дифф уравнение:
y[0] := 1
D(x, y) := x + y[0]^2
Z := rkfixed(y[0], 0, 0.6, 60, D)
n := 0 .. 60
x2 := Z[:, 0]
y2 := Z[:, 1]
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