# Laba 13
h := 0.01
n := 60
f(x, y) := e^x + y^2
i := 0 .. n - 1
[x[0]; y[0]] := [0; 0]
[x[i + 1]; y[i + 1]] := [x[i] + h; y[i] + h*f(x[i] + h/2, y[i] + h/2*f(x[i], y[i]))]
# Решение дифф уравнение:
y[0] := 0
D(x, y) := e^x + y[0]^2
Z := rkfixed(y[0], 0, 0.6, n, D)
x2 := Z[:, 0]
y2 := Z[:, 1]
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x[i] = [
    0; 0.01; 0.02; 0.03; 0.04; 0.05; 0.06; 0.07; 0.08; 0.09
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]
y[i] = [
    0; 0.0100504; 0.0202038; 0.0304633; 0.0408322; 0.0513137; 0.0619111; 0.0726279; 0.0834676; 0.0944339
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]
Z = [
    0, 0;
    0.01, 0.0100505;
    0.02, 0.020204;
    0.03, 0.0304637;
    0.04, 0.0408328;
    0.05, 0.0513144;
    0.06, 0.061912;
    0.07, 0.072629;
    0.08, 0.0834688;
    0.09, 0.0944353
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]
h1 := h/2
n := 60
f(x, y) := e^x + y^2
i := 0 .. n - 1
[x[0]; y[0]] := [0; 0]
[x[i + 1]; y[i + 1]] := [x[i] + h; y[i] + h*f(x[i] + h/2, y[i] + h/2*f(x[i], y[i]))]
# Решение дифф уравнение:
y[0] := 0
D(x, y) := e^x + y[0]^2
Z := rkfixed(y[0], 0, 0.6, n, D)
x2 := Z[:, 0]
y2 := Z[:, 1]
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x[i] = [
    0; 0.01; 0.02; 0.03; 0.04; 0.05; 0.06; 0.07; 0.08; 0.09
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]
y[i] = [
    0; 0.0100504; 0.0202038; 0.0304633; 0.0408322; 0.0513137; 0.0619111; 0.0726279; 0.0834676; 0.0944339
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]
Z = [
    0, 0;
    0.01, 0.0100505;
    0.02, 0.020204;
    0.03, 0.0304637;
    0.04, 0.0408328;
    0.05, 0.0513144;
    0.06, 0.061912;
    0.07, 0.072629;
    0.08, 0.0834688;
    0.09, 0.0944353
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]
